# work; ag. tractors for growing win wheat, 2014 fleet, all fuels; 100-175HP

Dataset: EcoSpold 1, unit process
Functional unit: 1 MJ
Category: Agriculture, forestry and fishing / Support activities for crop production
Geography: US-AR
Time period: 2014-01-01 to 2014-12-31
Generated by: Joyce Cooper
copyright: true
accessRestrictedTo: 0

## General comment
This unit process/ gate-to-gate dataset represents the production of 1 MJ of work by 100-175HP ag. tractors operating in 2014 in Arkansas (US State). Multiple fuels are used (Gasoline, Diesel). The process technologies represented are an aggregation of the exhaust technologies and control technologies over multiple model years as described in the USEPA's NONROAD model documentation (available at http://www.epa.gov/otaq/nonrdmdl.htm). Applicable classifications include ISIC 0161, NAIC 115110, UNSPSC 25101901. This dataset was prepared in ILCD format using the UWDFE Lab Excel to ILCD File Generator (gamma version, March 2014).

## Geography
The unit process is assumed to represent operation in Arkansas (US State).

## Technology
The process technologies represent the exhaust and evaporative technologies over multiple model years as described in the USEPA's NONROAD model documentation (available at http://www.epa.gov/otaq/nonrdmdl.htm). The minimum, average, and maximum operating temperatures are 9, 14, and 19 degrees C respectively, reflecting the temperatures during the growing season for win wheat in Arkansas . Included processes are fuel transport, consumption, and combustion; lubricant transport, use, and waste management; equipment and spare part set production; equipment retirement; and equipment storage.

## Time period
Start and end dates match the equipment operating year.

## Reference product
- work; ag. tractors for growing win wheat, 2014 fleet, all fuels; 100-175HP [US-AR]: 1 MJ

## Inputs from technosphere
- CUTOFF lubricating oil; for use in agricultural equipment; at refinery: 0.000130255 kg
  USDA LCADC data quality = (A,B,B,A,A,A,B,B)
- CUTOFF spare part set; ag. tractors; 100-175HP: 8.08812e-7 Item(s)
  USDA LCADC data quality = (A,B,B,A,A,A,B,B)
- CUTOFF storage; of farm equipment; at farm: 1.46032e-5 m2
  USDA LCADC data quality = (A,B,B,A,A,A,B,B)
- CUTOFF equ. retirement; ag. tractors; 100-175HP: 8.08812e-7 Item(s)
  USDA LCADC data quality = (A,B,B,A,A,A,B,B)
- CUTOFF production; ag. tractors; 100-175HP: 8.08812e-7 Item(s)
  USDA LCADC data quality = (A,B,B,A,A,A,B,B)
- CUTOFF gasoline; for offroad use; at refinery; RVP8, S%0.034, EtOH m%0.81b%0.087: 2.13973e-5 kg
  USDA LCADC data quality = (A,B,B,A,A,A,B,B)
- CUTOFF lubricating oil management; at farm: 2.60511e-5 kg
  USDA LCADC data quality = (A,B,B,A,A,A,B,B)
- CUTOFF diesel; for offroad use; at refinery, S%0.002: 0.0626593 kg
  USDA LCADC data quality = (A,B,B,A,A,A,B,B)
- CUTOFF local area trucking; class 6, average fuel: 0.00464066 t*km
  USDA LCADC data quality = (A,B,B,A,A,A,B,B)

## Emissions to nature
- Mercury (divalent gaseous) [Emission to air unmapped, low population density unmapped]: 1.21397e-9 kg
  USDA LCADC data quality = (A,B,B,A,A,A,B,B); Mercury (divalent gaseous)
- 2,3,4,7,8-Pentachlorodibenzofuran [Emission to air unmapped, low population density unmapped]: 1.67872e-11 kg
  USDA LCADC data quality = (A,B,B,A,A,A,B,B)
- Anthracene [Emission to air, low population density]: 5.39606e-11 kg
  USDA LCADC data quality = (A,B,B,A,A,A,B,B)
- Carbon dioxide, fossil [Emission to air, low population density]: 0.198738 kg
  USDA LCADC data quality = (A,B,B,A,A,A,B,B)
- Dinitrogen monoxide [Emission to air, low population density]: 5.02488e-6 kg
  USDA LCADC data quality = (A,B,B,A,A,A,B,B)
- Methane, fossil [Emission to air, low population density]: 1.91223e-6 kg
  USDA LCADC data quality = (A,B,B,A,A,A,B,B)
- Benz(a)anthracene [Emission to air, low population density]: 8.04994e-11 kg
  USDA LCADC data quality = (A,B,B,A,A,A,B,B); Benz(a)anthracene
- Chromium, ion [Emission to air, low population density]: 7.9109e-9 kg
  USDA LCADC data quality = (A,B,B,A,A,A,B,B)
- Benzo(b)fluoranthene [Emission to air, low population density]: 5.58922e-11 kg
  USDA LCADC data quality = (A,B,B,A,A,A,B,B)
- Acrolein [Emission to air, low population density]: 3.79395e-7 kg
  USDA LCADC data quality = (A,B,B,A,A,A,B,B)
- Chromium VI [Emission to air, low population density]: 4.07531e-9 kg
  USDA LCADC data quality = (A,B,B,A,A,A,B,B)
- Octachlorodibenzofuran [Emission to air unmapped, low population density unmapped]: 6.696e-11 kg
  USDA LCADC data quality = (A,B,B,A,A,A,B,B)
- Carbon monoxide, fossil [Emission to air, low population density]: 0.000554685 kg
  USDA LCADC data quality = (A,B,B,A,A,A,B,B)
- Nickel [Emission to air, low population density]: 7.58425e-7 kg
  USDA LCADC data quality = (A,B,B,A,A,A,B,B)
- 1,2,3,4,7,8,9-Heptachlorodibenzofuran [Emission to air unmapped, low population density unmapped]: 6.67971e-12 kg
  USDA LCADC data quality = (A,B,B,A,A,A,B,B)
- Fluoranthene [Emission to air, low population density]: 1.91766e-9 kg
  USDA LCADC data quality = (A,B,B,A,A,A,B,B)
- 1,2,3,4,7,8-Hexachlorodibenzofuran [Emission to air unmapped, low population density unmapped]: 2.83447e-11 kg
  USDA LCADC data quality = (A,B,B,A,A,A,B,B)
- Mercury (particulate) [Emission to air unmapped, low population density unmapped]: 6.25889e-10 kg
  USDA LCADC data quality = (A,B,B,A,B,A,B,B); Mercury (particulate)
- Benzo(a)pyrene [Emission to air, low population density]: 4.00173e-11 kg
  USDA LCADC data quality = (A,B,B,A,A,A,B,B)
- Total Organic Gases [Emission to air unmapped, low population density unmapped]: 0.00012728 kg
  USDA LCADC data quality = (A,B,B,A,B,A,B,B); Total Organic Gases
- Butadiene [Emission to air, low population density]: 2.33908e-7 kg
  USDA LCADC data quality = (A,B,B,A,A,A,B,B)
- Indeno(1,2,3,c,d)pyrene [Emission to air, low population density]: 9.41129e-12 kg
  USDA LCADC data quality = (A,B,B,A,A,A,B,B)
- Particulates, > 2.5 um, and < 10um [Emission to air, low population density]: 3.37404e-6 kg
  USDA LCADC data quality = (A,B,B,A,B,A,B,B)
- Arsenic [Emission to air, low population density]: 4.37077e-9 kg
  USDA LCADC data quality = (A,B,B,A,B,A,B,B); Arsenic & compounds
- 1,2,3,7,8-Pentachlorodibenzo-p-Dioxin [Emission to air, low population density]: 6.37209e-12 kg
  USDA LCADC data quality = (A,B,B,A,A,A,B,B)
- 1,2,3,7,8,9-Hexachlorodibenzofuran [Emission to air unmapped, low population density unmapped]: 7.51465e-12 kg
  USDA LCADC data quality = (A,B,B,A,A,A,B,B)
- 2,3,4,6,7,8-Hexachlorodibenzofuran [Emission to air unmapped, low population density unmapped]: 1.87208e-11 kg
  USDA LCADC data quality = (A,B,B,A,A,A,B,B)
- Styrene [Emission to air, low population density]: 7.44532e-8 kg
  USDA LCADC data quality = (A,B,B,A,A,A,B,B)
- Naphthalene [Emission to air, low population density]: 5.23257e-8 kg
  USDA LCADC data quality = (A,B,B,A,A,A,B,B)
- Particulates, < 2.5 um [Emission to air, low population density]: 0.000109083 kg
  USDA LCADC data quality = (A,B,B,A,B,A,B,B)
- Non-Methane Hydrocarbons [Emission to air unmapped, low population density unmapped]: 0.000117046 kg
  USDA LCADC data quality = (A,B,B,A,B,A,B,B); Non-Methane Hydrocarbons
- 2,2,4-Trimethylpentane [Emission to air unmapped, low population density unmapped]: 9.2356e-8 kg
  USDA LCADC data quality = (A,B,B,A,A,A,B,B)
- 1,2,3,4,7,8-Hexachlorodibenzo-p-Dioxin [Emission to air unmapped, low population density unmapped]: 8.96485e-12 kg
  USDA LCADC data quality = (A,B,B,A,A,A,B,B)
- Dioxins, measured as 2,3,7,8-tetrachlorodibenzo-p-dioxin [Emission to air, low population density]: 7.53671e-12 kg
  USDA LCADC data quality = (A,B,B,A,B,A,B,B)
- Acenaphthene [Emission to air, low population density]: 1.12499e-8 kg
  USDA LCADC data quality = (A,B,B,A,A,A,B,B)
- Sulfur dioxide [Emission to air, low population density]: 2.34398e-6 kg
  USDA LCADC data quality = (A,B,B,A,A,A,B,B)
- Mercury [Emission to air, low population density]: 2.35313e-9 kg
  USDA LCADC data quality = (A,B,B,A,A,A,B,B)
- Benzene, ethyl- [Emission to air, low population density]: 3.89857e-7 kg
  USDA LCADC data quality = (A,B,B,A,A,A,B,B)
- Carbon dioxide, biogenic [Emission to air, low population density]: 3.81242e-6 kg
  USDA LCADC data quality = (A,B,B,A,A,A,B,B)
- Acenaphthylene [Emission to air, low population density]: 9.47301e-9 kg
  USDA LCADC data quality = (A,B,B,A,A,A,B,B)
- 1,2,3,4,6,7,8-Heptachlorodibenzofuran [Emission to air unmapped, low population density unmapped]: 5.86686e-11 kg
  USDA LCADC data quality = (A,B,B,A,A,A,B,B)
- NMVOC, non-methane volatile organic compounds, unspecified origin [Emission to air, low population density]: 0.000125248 kg
  USDA LCADC data quality = (A,B,B,A,B,A,B,B)
- 2,3,7,8-Tetrachlorodibenzofuran [Emission to air unmapped, low population density unmapped]: 1.90067e-11 kg
  USDA LCADC data quality = (A,B,B,A,A,A,B,B)
- Nitrogen oxides [Emission to air, low population density]: 0.00148221 kg
  USDA LCADC data quality = (A,B,B,A,B,A,B,B)
- Benzo(g,h,i)perylene [Emission to air, low population density]: 2.30806e-11 kg
  USDA LCADC data quality = (A,B,B,A,A,A,B,B)
- Fluorene [Emission to air, low population density]: 1.1255e-8 kg
  USDA LCADC data quality = (A,B,B,A,A,A,B,B)
- Secondary Organic Aerosol [Emission to air unmapped, low population density unmapped]: 2.9663e-6 kg
  USDA LCADC data quality = (A,B,B,A,B,A,B,B); Secondary Organic Aerosol
- 1,2,3,7,8,9-Hexachlorodibenzo-p-Dioxin [Emission to air, low population density]: 3.22997e-11 kg
  USDA LCADC data quality = (A,B,B,A,A,A,B,B)
- Non-Methane Organic Gases [Emission to air unmapped, low population density unmapped]: 0.000125368 kg
  USDA LCADC data quality = (A,B,B,A,B,A,B,B); Non-Methane Organic Gases
- Toluene [Emission to air, low population density]: 1.8799e-6 kg
  USDA LCADC data quality = (A,B,B,A,A,A,B,B)
- Ammonia [Emission to air, low population density]: 0.00162494 kg
  USDA LCADC data quality = (A,B,B,A,A,A,B,B)
- 1,2,3,7,8-Pentachlorodibenzofuran [Emission to air unmapped, low population density unmapped]: 7.58074e-12 kg
  USDA LCADC data quality = (A,B,B,A,A,A,B,B)
- 1,2,3,6,7,8-Hexachlorodibenzofuran [Emission to air unmapped, low population density unmapped]: 1.292e-11 kg
  USDA LCADC data quality = (A,B,B,A,A,A,B,B)
- Propanal [Emission to air, low population density]: 1.47662e-6 kg
  USDA LCADC data quality = (A,B,B,A,A,A,B,B)
- 1,2,3,6,7,8-Hexachlorodibenzo-p-Dioxin [Emission to air, low population density]: 1.75781e-11 kg
  USDA LCADC data quality = (A,B,B,A,A,A,B,B)
- Pyrene [Emission to air, low population density]: 3.34286e-10 kg
  USDA LCADC data quality = (A,B,B,A,A,A,B,B)
- Benzo(k)fluoranthene [Emission to air, low population density]: 4.01492e-11 kg
  USDA LCADC data quality = (A,B,B,A,A,A,B,B)
- Xylene [Emission to air, low population density]: 1.33068e-6 kg
  USDA LCADC data quality = (A,B,B,A,A,A,B,B)
- Acetaldehyde [Emission to air, low population density]: 6.64227e-6 kg
  USDA LCADC data quality = (A,B,B,A,A,A,B,B)
- Manganese [Emission to air, low population density]: 5.10458e-7 kg
  USDA LCADC data quality = (A,B,B,A,A,A,B,B)
- Formaldehyde [Emission to air, low population density]: 1.47853e-5 kg
  USDA LCADC data quality = (A,B,B,A,A,A,B,B)
- 1,2,3,4,6,7,8-Heptachlorodibenzo-p-Dioxin [Emission to air unmapped, low population density unmapped]: 2.10937e-10 kg
  USDA LCADC data quality = (A,B,B,A,A,A,B,B)
- Chrysene [Emission to air, low population density]: 2.14315e-10 kg
  USDA LCADC data quality = (A,B,B,A,A,A,B,B)
- Dibenzo(a,h)anthracene [Emission to air, low population density]: 3.26106e-13 kg
  USDA LCADC data quality = (A,B,B,A,A,A,B,B)
- Hexane [Emission to air, low population density]: 2.00349e-7 kg
  USDA LCADC data quality = (A,B,B,A,A,A,B,B)
- Benzene [Emission to air, low population density]: 2.55064e-6 kg
  USDA LCADC data quality = (A,B,B,A,A,A,B,B)
- Octachlorodibenzo-p-dioxin [Emission to air unmapped, low population density unmapped]: 9.7449e-10 kg
  USDA LCADC data quality = (A,B,B,A,A,A,B,B)
- Phenanthrene [Emission to air, low population density]: 2.92538e-8 kg
  USDA LCADC data quality = (A,B,B,A,A,A,B,B)

## Sampling procedure
Boundary conditions are defined to represent equipment operation, maintenance, production, storage, and retirement based on the expected equipment lives and annual use rates in the NONROAD documentation. Representations of uncertainty are not included in aggregate fleet datasets but can be added to cover fuel carbon mass fraction, fuel consumption, and CO2 emissions; load factors; fuel sulfur and ethanol contents; air emissions and waste management; and fuel and lubricant transport as described in Cooper et. al “Unit process data for agricultural self-propelled equipment” University of Washington Design for Environment Laboratory, March 2013. https://data.nal.usda.gov/dataset/unit-process-data-agricultural-self-propelled-equipment

## Sources
- Parameterization in Life Cycle Assessment Inventory Data: review of current use and the representation of uncertainty, Cooper, J.S., Noon, M., Kahn, E. (2012) Parameterization in Life Cycle Assessment Inventory Data: review of current use and the representation of uncertainty, unknown
Cooper, J.S., Noon, M., Kahn, E. (2012). Parameterization in Life Cycle Assessment Inventory Data: review of current use and the representation of uncertainty. International Journal of Life Cycle Assessment, 17(6), 689-695. doi:10.1007/s11367-012-0411-1 Retrieved from http://link.springer.com/content/pdf/10.1007/s11367-012-0411-1.pdf
- Commentary on issues in data quality analysis in life cycle assessment, Cooper, J.S., Kahn, E. (2012) Commentary on issues in data quality analysis in life cycle assessment, unknown
Cooper, J.S., Kahn, E. (2012). Commentary on issues in data quality analysis in life cycle assessment. International Journal of Life Cycle Assessment, 17(4), 499-503. doi:10.1007/s11367-011-0371-x Retrieved from http://link.springer.com/article/10.1007%2Fs11367-011-0371-x
- Unit process data for agricultural self-propelled equipment version 1, Cooper et. al. (2014) “Unit process data for agricultural self-propelled equipment, Version 1” University of Washington Design for Environment Laboratory. Unpublished report. https://data.nal.usda.gov/dataset/unit-process-data-agricultural-self-propelled-equipment-version-1, unknown
This document describes the preparation of datasets for the LCA Digital Commons that represent unit process/ gate-to-gate operations for the production of work (in MJ) by agricultural self-propelled equipment and fleets of agricultural self-propelled equipment. The data cover 19 types of fleets and over 200 types of self-propelled equipment datasets, representing the potential to prepare thousands of unit-process datasets by varying the operating and model years, applicable power ranges, and operating temperatures.

The key information source used for datasets development is the documentation and supporting data developed for the US Environmental Protection Agency (USEPA) NONROAD2008a model. In addition to the data and mathematical relationships described in the NONROAD documentation, data from a range of sources are used to add lubricant use and management estimates; add equipment production and storage, spare parts production, and equipment retirement estimates; estimate specific air emissions and groupings of air emissions; and add variability and uncertainty estimates.

## Validation
The review panel convened during March of 2013 and January of 2014 to review data preparation methods. The panel members were Troy Hawkins (National Risk Management Research Laboratory, USEPA), Alberta Carpenter (National Renewable Energy Laboratory, USDOE), Thomas Transue (Lockheed Martin Information Technology), Wes Ingwersen (National Risk Management Research Laboratory, USEPA), and Harvey Michaels (Office of Transportation and Air Quality, USEPA).
